*Step, name=Step-1, nlgeom=NO, perturbation
*Static
1., 1., 1e-05, 1.
**
*Dsload
Surf-1, EDNOR, -1.
** OUTPUT REQUESTS
**
*Restart, write, frequency=0
**
** FIELD OUTPUT: F-Output-1
**
*Output, field
*Node Output
U,
**
*Output, field
*Element Output, directions=YES
1, 2, 3, 4, 5, 6, 7, 8, 9, 10, 11, 12, 13, 14, 15, 16
CFAILURE, E, S, STH
** HISTORY OUTPUT: H-Output-1
**
*Output, history
*Element Output, elset=PART-1-1.steered
MASS
*Output, history
*Energy Output
ALLKE, ALLSE
*End Step
